# OpenSim document version 20303
Model arm22:
  length_units: meters
  force_units: N
  gravity: 0 -9.8066 0
  credits:
    The OpenSim Development Team (Reinbolt, J; Seth, A; Habib, A; Hamner, S) adapted from a model originally created by Kate Holzbaur (11/22/04)
    License:
    Creative Commons (CCBY 3.0). You are free to distribute, remix, tweak, and build upon this work, even commercially,
    as long as you credit us for the original creation.
    http://creativecommons.org/licenses/by/3.0/
  publications:
    Holzbaur, K.R.S., Murray, W.M., Delp, S.L. A Model of the Upper Extremity for Simulating Musculoskeletal Surgery and Analyzing Neuromuscular Control.
    Annals of Biomedical Engineering, vol 33, pp 829–840, 2005
  BodySet:
    Body ground: mass=0 mass_center=(0 0 0) inertia_xx=0 inertia_yy=0 inertia_zz=0
    Body base: mass=0 mass_center=(0 0 0) inertia_xx=0 inertia_yy=0 inertia_zz=0
        meshes=(ground_ribs.vtp ground_spine.vtp ground_skull.vtp ground_jaw.vtp ground_r_clavicle.vtp ground_r_scapula.vtp)
      WeldJoint offset: parent_body=ground location_in_parent=(0 0.8 0) location=(0 0 0)
    Body r_humerus: mass=1.864572 mass_center=(0 -0.180496 0) inertia_xx=0.01481 inertia_yy=0.004551
        inertia_zz=0.013193 meshes=arm_r_humerus.vtp
      CustomJoint r_shoulder: parent_body=base location_in_parent=(-0.017545 -0.007 0.17) location=(0 0 0)
        SpatialTransform: axes_held_at_zero=(rotation2 rotation3 translation1 translation2 translation3)
          TransformAxis rotation1: coordinates=r_shoulder_elev axis=(-0.05889802 0.0023 0.9982614)
              LinearFunction(coefficients=1 0)
        Coordinate r_shoulder_elev: motion_type=rotational default_value=0 range=(-1.570796 3.141593) clamped=false
      WrapCylinder TRI: xyz_body_rotation=(-0.14015 -0.00628319 0.154985) translation=(0.0028 -0.2919 -0.0069)
          quadrant=all radius=0.016 length=0.05
    Body r_ulna_radius_hand: mass=1.534315 mass_center=(0 -0.181479 0) inertia_xx=0.019281 inertia_yy=0.001571
        inertia_zz=0.020062
        meshes=(arm_r_ulna.vtp arm_r_radius.vtp arm_r_lunate.vtp arm_r_scaphoid.vtp arm_r_pisiform.vtp arm_r_triquetrum.vtp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)
      CustomJoint r_elbow: parent_body=r_humerus location_in_parent=(0.0061 -0.2904 -0.0123) location=(0 0 0)
        SpatialTransform: axes_held_at_zero=(rotation2 rotation3 translation1 translation2 translation3)
          TransformAxis rotation1: coordinates=r_elbow_flex axis=(0.04940001 0.03660001 0.9981083)
              LinearFunction(coefficients=1 0)
        Coordinate r_elbow_flex: motion_type=rotational default_value=0 range=(0 2.268928) clamped=false
  ForceSet:
    DeGrooteFregly2016Muscle TRImed: min_control=0.01 max_control=1 max_isometric_force=624.3
        optimal_fiber_length=0.1138 tendon_slack_length=0.0908 pennation_angle_at_optimal=0.1570796 [radians]
        max_contraction_velocity=10 ignore_tendon_compliance=true activation_time_constant=0.015
        deactivation_time_constant=0.06 default_activation=0.01 active_force_width_scale=1 fiber_damping=0
        tendon_strain_at_one_norm_force=0.049 ignore_passive_fiber_force=false
      PathPoint P1: r_humerus (-0.00838 -0.13695 -0.00906)
      PathPoint P2: r_humerus (-0.02601 -0.15139 -0.0108)
      PathPoint P3: r_humerus (-0.03184 -0.22637 -0.01217)
      PathPoint P4: r_humerus (-0.01743 -0.26757 -0.01208)
      PathPoint P5: r_ulna_radius_hand (-0.0219 0.01046 -0.00078)
      PathWrap: wrap_object=TRI method=hybrid
    DeGrooteFregly2016Muscle BRA: min_control=0.01 max_control=1 max_isometric_force=987.26 optimal_fiber_length=0.0858
        tendon_slack_length=0.0535 pennation_angle_at_optimal=0 max_contraction_velocity=10
        ignore_tendon_compliance=true activation_time_constant=0.015 deactivation_time_constant=0.06
        default_activation=0.01 active_force_width_scale=1 fiber_damping=0 tendon_strain_at_one_norm_force=0.049
        ignore_passive_fiber_force=false
      PathPoint P1: r_humerus (0.0068 -0.1739 -0.0036)
      PathPoint P2: r_ulna_radius_hand (-0.0032 -0.0239 0.0009)
      PathWrap: wrap_object=TRI method=hybrid
